#input params are npm and R
#tSteps     = number of timesteps for filling
#R          = radius of cylinder
#nParts     = number of particles
# lmp_serial -var tSteps 45000 -var R 5 -var nParts 800 < in.janssen


atom_style	sphere
atom_modify map hash
boundary	f f f
newton		off


comm_modify	vel yes
neighbor	0.2 bin
# neigh_modify	delay 0
variable        w2 equal 10
variable        h2 equal 20

variable d1             equal 1.0   #cylinder material
variable d2             equal 1.0   #measure material
variable d3             equal 0.2   #poured material
variable fcSp           equal 10
variable fcSp2          equal 5
# variable R            equal 3.5
variable in_cylr        equal "v_R+v_d1/2"
variable out_cylr       equal "v_R"
variable sysCylSize     equal "v_R+4*v_d1"
variable sysCylH        equal "v_h2+5"


region sys cylinder z    0 0 ${sysCylSize} -2 ${sysCylH} units box       #rad=4
# region measure block -${R} ${R} -${R} ${R} 0 0 units box
create_box	4 sys
molecule mol1 mol.star

#########bottom plate##############
lattice fcc ${fcSp} origin 0 0 0
variable r1 equal "v_d1*2/3"
variable b equal "(-v_d1/4.0)"
variable rn equal "v_R-v_d1/4.0"
# region measure block -${R} ${R} -${R} ${R} -0.25 0 units box
region measure cylinder z    0 0 ${rn} -0.25 0 units box
# create_atoms	2 region measure

# set type 2 diameter ${d1}
group measure region measure

#########poured material##############
variable bottomFill equal "v_h2-5.0"
lattice fcc ${d3} origin 0 0 0
variable rn equal "v_R-2*v_d1/2"
#create_atoms 3 box
region pouredParts cylinder z 0 0 ${rn} ${bottomFill} ${h2} units box side in
#set type 3 diameter ${d3}
group pouredParts type 3

variable k0     equal 0.1633 #if change sim params must change this!
variable mup    equal 0.5
variable muw    equal 0.5
variable kn     equal "2*10^6*v_k0"

variable kt     equal "2/7*v_kn" # 2/7kn or 2/(7kn) check this value!
variable g_n    equal "50"
variable g_t    equal "50"

#for filling time, pourSteps~partNums,  pourSteps = 11*partNums-110
variable pourSteps equal "v_tSteps"


# variable nParts equal "v_nParts"
variable nPartsSTR    string ${nParts}
shell mkdir r=${R}
shell mkdir r=${R}/${nPartsSTR}
#####add gravity to poured particles#######
fix		2 pouredParts gravity 1.0 spherical 0.0 -180.0

#set sim params
##from pdf, maybe should change stiffness to 2e5?
# http://lammps.sandia.gov/doc/units.html units in lammps
#lj units

timestep .001
run_style verlet
fix		6 all nve/sphere  #integrator type

region cylout cylinder z    0 0 ${R} 0 ${sysCylH} units box       #rad=4


pair_style gran/hertz/history ${kn} ${kt} ${g_n} NULL ${mup} 1

fix		wallout all wall/gran hertz/history ${kn} ${kt} ${g_n} ${g_t} ${mup} 1 zcylinder ${R}   #integrator type
fix    	bott    all wall/gran hertz/history ${kn} ${kt} ${g_n} ${g_t} ${mup} 1 zplane 0 NULL  #integrator type

# fix		bott all wall/gran hertz/history ${kn} ${kt} ${g_n} ${g_t} ${mup} 1
#http://lammps.sandia.gov/doc/fix_wall_gran.html

pair_coeff	* *

variable p1 equal f_wallout
variable p2 equal f_bott


compute		1 all erotate/sphere
compute 2 all temp/sphere
#######pour in particles
# fix		ins pouredParts pour ${nParts} 3 300719 vol 0.20 100 region pouredParts
# fix 22 pouredParts rigid molecule mol mol1
fix 22 pouredParts rigid/small molecule mol mol1
# fix dep pouredParts deposit ${nParts} 1 50 300719 region pouredParts mol mol1
fix		ins pouredParts pour ${nParts} 1 300719 vol 0.20 100 region pouredParts mol mol1 rigid 22

# set atom * mass 1.0
thermo_style	custom step atoms ke c_1 v_p1 v_p2
thermo		100

thermo_modify	lost ignore norm no
thermo_modify  temp 2
compute_modify	thermo_temp dynamic yes
variable ep equal  1
variable sig equal  1
variable rr equal  1


fix forcePrint measure print ${pourSteps} "${p1} ${p2}" file r=${R}/${nPartsSTR}/forces.txt screen no
dump		1 all movie 100 r=${R}/${nPartsSTR}/FillContainer.mpg type type &
            axes yes 0.8 0.02 view 80 -30  #80 -30
dump_modify 1 adiam 1 ${d1} adiam 2 ${d2} adiam 3 ${d3}


run		${pourSteps}

write_dump all custom r=${R}/${nPartsSTR}/lastFramePour.txt id type x y z fx fy fz
undump 1

run 1


##############################new press stuff############################

variable temp equal bound(pouredParts,zmax)
variable crushMin equal "v_temp+2"
variable crushMax equal "v_crushMin+5"
variable Rcrush equal "v_R-.5"
region crushCyl cylinder z 0 0 ${Rcrush} ${crushMin} ${crushMax} units box side in

lattice fcc ${d1} origin 0 0 0
create_atoms 2 region crushCyl

group t2 type 2
fix 9 t2 rigid single
fix		10 t2 gravity 1.0 spherical 0.0 -180.0

variable crushsteps equal 30000


variable cp1 equal f_wallout
variable cp2 equal f_bott

variable outerParts equal "v_R-1"
region cylout2 cylinder z    0 0 ${outerParts} 0 ${sysCylH} side out units box      #rad=4
group viz region cylout2
write_dump all custom r=${R}/${nPartsSTR}/lastFrameCrush.txt id type x y z fx fy fz
fix crushPrint measure print ${crushsteps} "${cp1} ${cp2}" file r=${R}/${nPartsSTR}/crushforces.txt screen no
dump		2 all movie 100 r=${R}/${nPartsSTR}/crushMovie.mpg type type &
	            axes yes 0.8 0.02 view 80 -30  #80 -30
dump_modify 2 adiam 1 ${d1} adiam 2 ${d2} adiam 3 ${d3}
run		${crushsteps}
